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# PROJECT NO.  14.021
# DATE  3/27/14
# BY  CDR
# SHEET _________________
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# Check Stringer
# In the following sheets, the stringer, indicated by the drawing at right is checked, first for allowable deflection, and secondly for moment capacity
# Check Deflection
# The stringer is modeled as a fixed cantilever.
l := 1.5 ft  # Length of Cantilever
w := ((66 + 3 + 10 + 2)/2) plf  # Distributed Load split between two stringers
# Fig. 1
I := 0.0503 in^4  # Moment of Inertia of stringer section
E := 29000 kip/in^2  # Modulus of Elasticity
x := 1.5 ft  # Length, from start of cantilever where deflection is calculated
Δ_DL := w*l^4/(8*E*I) = 0.0303604 in
# Additional deflection is due to the point loads produced by the 12" runway on the lower level, shown in Fig. 1
d_2 := 6 in  # Tributary length of adjacent runway
w_2 := 69 plf  # The weight of the adjacent runway is modeled as an individual point load.
P_2 := d_2*w_2 = 34.5 lbf  # Point load from adjacent runway
l_2 := 18 in
b_2 := 12 in
a_2 := 6 in  # Distance to application of point load
# Distance from cantilever where deflection is calculated.
Δ_ADJACENT_RUNWAY := P_2*b_2^2/(6*E*I)*(3*l_2 - b_2) = 0.0238404 in
Σ := Δ_ADJACENT_RUNWAY + Δ_DL = 0.0542008 in
x/Σ = 332.098  # Therefore, deflection is OK.
